<?xml version="1.0"?>
<?xml-stylesheet type="text/xsl" href="http://jsbsim.sourceforge.net/JSBSim.xsl"?>
<fdm_config name="E170" version="2.0" release="BETA"
   xmlns:xsi="http://www.w3.org/2001/XMLSchema-instance"
   xsi:noNamespaceSchemaLocation="http://jsbsim.sourceforge.net/JSBSim.xsd">

    <fileheader>
        <author>Narendran Muraleedharan</author>
        <author>Tobias Dammers</author>
        <filecreationdate>2011-08-08</filecreationdate>
        <version>$Revision: 2.0$</version>
        <description> Flight Dynamics Model for the Embraer 175</description>
    </fileheader>

    <!-- UNIT CONVERSIONS :
1 meter = 3.2 feet
1 foot = 0.3048 m
1 meter = 39.4 inches
1 sq. m = 10.24 sq. ft.
1 foot  = 12 inches -->

    <metrics>
        <!-- Calculated Wing Area (wikipedia) -->
        <wingarea  unit="M2">72.72</wingarea>
        <!-- Wingspan 26 m (wikipedia/FCOM) -->
        <wingspan  unit="FT" >85.3</wingspan>
        <!-- Wing Incidence = 3 (pure guesswork) -->
        <wing_incidence unit="DEG"> 3.0 </wing_incidence>
        <!-- Chord = 4.72 m from  -->
        <chord     unit="FT" >   14.72 </chord>
        <!-- Horizontal Tail Area = 18.9735 sq m (calculated on paper) -->
        <htailarea unit="FT2">  194.28864 </htailarea>
        <!-- Horizontal Tail Arm (extrapolated from E170) -->
        <htailarm  unit="FT" >   45.19 </htailarm>
        <!-- Vertical Tail Area = 17.2975 sq m (calculated on paper) -->
        <vtailarea unit="FT2">  177.1264 </vtailarea>
        <!-- Vertical Tail Arm (extrapolated from E170) -->
        <vtailarm  unit="FT" > 43.80</vtailarm>
        <location name="AERORP" unit="IN">
            <x> 0 </x>
            <y> 0 </y>
            <z> 0 </z>
        </location>
        <!-- Eyepoint extrapolated from E170 -->
        <location name="EYEPOINT" unit="IN">
            <x> -460.95 </x>
            <y> 0 </y>
            <z> 1.14 </z>
        </location>
        <!-- VRP extrapolated from E170 -->
        <location name="VRP" unit="IN">
            <x>42.55</x>
            <y> 0 </y>
            <z> 0 </z>
        </location>
    </metrics>

    <mass_balance>
        <ixx unit="SLUG*FT2">    662000 </ixx>
        <iyy unit="SLUG*FT2">    500000 </iyy>
        <izz unit="SLUG*FT2">    662000 </izz>
        <ixy unit="SLUG*FT2">         0 </ixy>
        <ixz unit="SLUG*FT2">         0 </ixz>
        <iyz unit="SLUG*FT2">         0 </iyz>
        <!-- Operational Empty Weight = 44,600 lbs from wikipedia -->
        <emptywt unit="KG" > 21890 </emptywt>

        <!-- extrapolated from E170 -->
        <location name="CG" unit="IN">
            <x>-34</x>
            <y>0.0</y>
            <z>0.0</z>
        </location>

        <pointmass name="Crew">
            <weight unit="LBS">360</weight>
            <location name="POINTMASS" unit="IN">
                <x>-460.95</x>
                <y>0</y>
                <z>1.14</z>
            </location>
        </pointmass>
        <pointmass name="Passengers Front">
            <weight unit="LBS">0</weight>
            <location name="POINTMASS" unit="IN">
                <x>-275.0</x>
                <y>0</y>
                <z>1.14</z>
            </location>
        </pointmass>
        <pointmass name="Passengers Back">
            <weight unit="LBS">0</weight>
            <location name="POINTMASS" unit="IN">
                <x>137.5</x>
                <y>0</y>
                <z>1.14</z>
            </location>
        </pointmass>
        <pointmass name="Cargo Front">
            <weight unit="LBS">0</weight>
            <location name="POINTMASS" unit="IN">
                <x>-275.0</x>
                <y>0</y>
                <z>0</z>
            </location>
        </pointmass>
        <pointmass name="Cargo Back">
            <weight unit="LBS">0</weight>
            <location name="POINTMASS" unit="IN">
                <x>139.38</x>
                <y>0</y>
                <z>0</z>
            </location>
        </pointmass>

    </mass_balance>

    <ground_reactions>

        <!-- Nose Gear Contact Point -->
        <contact type="BOGEY" name="NOSE_GEAR">
            <location unit="IN">
                <!-- extrapolated from E170 -->
                <x> -398.38</x>
                <y> 0.00 </y>
                <z> -89.832 </z>
            </location>
            <static_friction>  1.50 </static_friction>
            <dynamic_friction> 0.50 </dynamic_friction>
            <rolling_friction> 0.005 </rolling_friction>
            <spring_coeff unit="LBS/FT"> 25000 </spring_coeff>
            <damping_coeff unit="LBS/FT/SEC"> 10000 </damping_coeff>
            <max_steer unit="DEG">76</max_steer>
            <castered>1</castered>
            <brake_group>NONE</brake_group>
            <retractable>1</retractable>
            <table name="CORNERING_COEFF" type="internal">
                <tableData> <!-- jsbsim-pacejka.py 3.0 0.03 2.85 1.4 1.03 1.4 -->
                    -90.0 -0.64429852792097750
                    -85.0 -0.65803784878515970
                    -80.0 -0.67367546323532410
                    -75.0 -0.69148835376736980
                    -70.0 -0.71179130570975040
                    -65.0 -0.73493212105552120
                    -60.0 -0.76127441823995780
                    -55.0 -0.79115479580170660
                    -50.0 -0.82478835297656280
                    -45.0 -0.86207184328003720
                    -40.0 -0.90218731471298370
                    -35.0 -0.94282786495867110
                    -30.0 -0.97874912755212280
                    -25.0 -0.99927325792190310
                    -20.0 -0.98471983766820350
                    -15.0 -0.90363984864415470
                    -10.0 -0.71770750752441240
                    -5.0 -0.40543502538657494
                    0.0  0.00000000000000000
                    5.0  0.40543502538657494
                    10.0  0.71770750752441240
                    15.0  0.90363984864415470
                    20.0  0.98471983766820350
                    25.0  0.99927325792190310
                    30.0  0.97874912755212280
                    35.0  0.94282786495867110
                    40.0  0.90218731471298370
                    45.0  0.86207184328003720
                    50.0  0.82478835297656280
                    55.0  0.79115479580170660
                    60.0  0.76127441823995780
                    65.0  0.73493212105552120
                    70.0  0.71179130570975040
                    75.0  0.69148835376736980
                    80.0  0.67367546323532410
                    85.0  0.65803784878515970
                    90.0  0.64429852792097750
                </tableData>
            </table>
        </contact>

        <!-- Left Main Gear Contact Point -->
        <contact type="BOGEY" name="LEFT_MAIN">
            <location unit="IN">
                <x>   41.34</x>
                <y> -101.258 </y>
                <z>  -93.772 </z>
            </location>
            <static_friction>  0.40 </static_friction>
            <dynamic_friction> 0.50 </dynamic_friction>
            <rolling_friction> 0.005 </rolling_friction>
            <spring_coeff unit="LBS/FT"> 48000 </spring_coeff>
            <damping_coeff unit="LBS/FT/SEC"> 24000 </damping_coeff>
            <max_steer unit="DEG">0</max_steer>
            <table name="CORNERING_COEFF" type="internal">
                <tableData> <!-- jsbsim-pacejka.py 3.0 0.06 2.8 0.4 1.03 0.4 -->
                    -90.0 -0.5760395836174765
                    -85.0 -0.5776440181093163
                    -80.0 -0.5803918992801416
                    -75.0 -0.5845010317001210
                    -70.0 -0.5902476568617109
                    -65.0 -0.5979865464058901
                    -60.0 -0.6081793463286825
                    -55.0 -0.6214348494943271
                    -50.0 -0.6385661913510731
                    -45.0 -0.6606706311692150
                    -40.0 -0.6892340269266316
                    -35.0 -0.7262408296125531
                    -30.0 -0.7741813043425955
                    -25.0 -0.8355026710967954
                    -20.0 -0.9097416834082445
                    -15.0 -0.9818532434458515
                    -10.0 -0.9824937511496707
                    -5.0 -0.7127565569007204
                    0.0  0.0000000000000000
                    5.0  0.7127565569007204
                    10.0  0.9824937511496707
                    15.0  0.9818532434458515
                    20.0  0.9097416834082445
                    25.0  0.8355026710967954
                    30.0  0.7741813043425955
                    35.0  0.7262408296125531
                    40.0  0.6892340269266316
                    45.0  0.6606706311692150
                    50.0  0.6385661913510731
                    55.0  0.6214348494943271
                    60.0  0.6081793463286825
                    65.0  0.5979865464058901
                    70.0  0.5902476568617109
                    75.0  0.5845010317001210
                    80.0  0.5803918992801416
                    85.0  0.5776440181093163
                    90.0  0.5760395836174765
                </tableData>
            </table>
            <brake_group>LEFT</brake_group>
            <retractable>1</retractable>
        </contact>

        <!-- Right Main Gear Contact Point -->
        <contact type="BOGEY" name="RIGHT_MAIN">
            <location unit="IN">
                <x>  41.34</x>
                <y> 101.258 </y>
                <z> -93.772 </z>
            </location>
            <static_friction>  0.40 </static_friction>
            <dynamic_friction> 0.50 </dynamic_friction>
            <rolling_friction> 0.005 </rolling_friction>
            <spring_coeff unit="LBS/FT"> 48000 </spring_coeff>
            <damping_coeff unit="LBS/FT/SEC"> 24000 </damping_coeff>
            <max_steer unit="DEG">0</max_steer>
            <table name="CORNERING_COEFF" type="internal">
                <tableData> <!-- jsbsim-pacejka.py 3.0 0.06 2.8 0.4 1.03 0.4 -->
                    -90.0 -0.5760395836174765
                    -85.0 -0.5776440181093163
                    -80.0 -0.5803918992801416
                    -75.0 -0.5845010317001210
                    -70.0 -0.5902476568617109
                    -65.0 -0.5979865464058901
                    -60.0 -0.6081793463286825
                    -55.0 -0.6214348494943271
                    -50.0 -0.6385661913510731
                    -45.0 -0.6606706311692150
                    -40.0 -0.6892340269266316
                    -35.0 -0.7262408296125531
                    -30.0 -0.7741813043425955
                    -25.0 -0.8355026710967954
                    -20.0 -0.9097416834082445
                    -15.0 -0.9818532434458515
                    -10.0 -0.9824937511496707
                    -5.0 -0.7127565569007204
                    0.0  0.0000000000000000
                    5.0  0.7127565569007204
                    10.0  0.9824937511496707
                    15.0  0.9818532434458515
                    20.0  0.9097416834082445
                    25.0  0.8355026710967954
                    30.0  0.7741813043425955
                    35.0  0.7262408296125531
                    40.0  0.6892340269266316
                    45.0  0.6606706311692150
                    50.0  0.6385661913510731
                    55.0  0.6214348494943271
                    60.0  0.6081793463286825
                    65.0  0.5979865464058901
                    70.0  0.5902476568617109
                    75.0  0.5845010317001210
                    80.0  0.5803918992801416
                    85.0  0.5776440181093163
                    90.0  0.5760395836174765
                </tableData>
            </table>
            <brake_group>RIGHT</brake_group>
            <retractable>1</retractable>
        </contact>

        <!-- Left Wing Tip Contact Point -->
        <contact type="STRUCTURE" name="LEFT_WING_TIP">
            <location unit="IN">
                <x>  170.08</x>
                <y> -490.924 </y>
                <z> 10.64 </z>
            </location>
            <static_friction>  0.9 </static_friction>
            <dynamic_friction> 0.8 </dynamic_friction>
            <spring_coeff unit="LBS/FT">      200000.00 </spring_coeff>
            <damping_coeff unit="LBS/FT/SEC"> 10000.00 </damping_coeff>
            <brake_group> NONE </brake_group>
            <retractable>0</retractable>
        </contact>

        <!-- Right Wing Tip Contact Point -->
        <contact type="STRUCTURE" name="RIGHT_WING_TIP">
            <location unit="IN">
                <x> 170.08</x>
                <y> 490.924 </y>
                <z> 10.64 </z>
            </location>
            <static_friction>  0.9 </static_friction>
            <dynamic_friction> 0.8 </dynamic_friction>
            <spring_coeff unit="LBS/FT">      200000.00 </spring_coeff>
            <damping_coeff unit="LBS/FT/SEC"> 10000.00 </damping_coeff>
            <brake_group> NONE </brake_group>
            <retractable>0</retractable>
        </contact>

        <!-- Tail (in case of a tail strike) Contact Point -->
        <contact type="STRUCTURE" name="TAIL_STRIKE">
            <location unit="IN">
                <!-- extrapolated from E170 -->
                <x>671.59</x>
                <y> 0 </y>
                <z> 45.62914 </z>
            </location>
            <static_friction>  0.95 </static_friction>
            <dynamic_friction> 0.9 </dynamic_friction>
            <spring_coeff unit="LBS/FT">      200000.00 </spring_coeff>
            <damping_coeff unit="LBS/FT/SEC"> 10000.00 </damping_coeff>
            <brake_group> NONE </brake_group>
            <retractable>0</retractable>
        </contact>

        <!-- Nose (used for Ditching) Contact Point -->
        <contact type="STRUCTURE" name="TAIL_STRIKE">
            <location unit="IN">
                <!-- extrapolated from E170 -->
                <x>-575.65</x>
                <y> 0 </y>
                <z> -28.762 </z>
            </location>
            <static_friction>  0.95 </static_friction>
            <dynamic_friction> 0.9 </dynamic_friction>
            <spring_coeff unit="LBS/FT">      200000.00 </spring_coeff>
            <damping_coeff unit="LBS/FT/SEC"> 10000.00 </damping_coeff>
            <brake_group> NONE </brake_group>
            <retractable>0</retractable>
        </contact>

    </ground_reactions>

    <!-- 2 x General Electric CF34-8E Engines -->
    <propulsion>

        <engine file="GE_CF34-8E-L">
            <location unit="IN">
                <x> -78.74 </x>
                <y> -157.6 </y>
                <z> -43.34 </z>
            </location>
            <orient unit="DEG">
                <pitch> 0.00 </pitch>
                <roll>   0.00 </roll>
                <yaw>   0.00 </yaw>
            </orient>
            <feed>0</feed>
            <thruster file="direct">
                <location unit="IN">
                    <x> -78.74 </x>
                    <y> -157.6 </y>
                    <z> -43.34 </z>
                </location>
                <orient unit="DEG">
                    <pitch>  1.10 </pitch>
                    <roll>   0.00 </roll>
                    <yaw>   -1.00 </yaw>
                </orient>
            </thruster>
        </engine>

        <engine file="GE_CF34-8E-R">
            <location unit="IN">
                <x> -78.74 </x>
                <y> 157.6 </y>
                <z> -43.34 </z>
            </location>
            <orient unit="DEG">
                <pitch> 0.00 </pitch>
                <roll>   0.00 </roll>
                <yaw>   0.00 </yaw>
            </orient>
            <feed>1</feed>
            <thruster file="direct">
                <location unit="IN">
                    <x> -78.74 </x>
                    <y> 157.6 </y>
                    <z> -43.34 </z>
                </location>
                <orient unit="DEG">
                    <pitch> 1.10 </pitch>
                    <roll>  0.00 </roll>
                    <yaw>   1.00 </yaw>
                </orient>
            </thruster>
        </engine>

        <!-- Wing Fuel Tank LEFT -->
        <tank type="FUEL" number="0">
            <location unit="IN">
                <x> -30.0 </x>
                <y> -133.96 </y>
                <z> -5.91 </z>
            </location>
            <capacity unit="KG"> 4668 </capacity>
            <contents unit="KG"> 2000 </contents>
        </tank>

        <!-- Wing Fuel Tank RIGHT -->
        <tank type="FUEL" number="1">
            <location unit="IN">
                <x> -30.0 </x>
                <y> 133.96 </y>
                <z> -5.91 </z>
            </location>
            <capacity unit="KG"> 4668 </capacity>
            <contents unit="KG"> 2000 </contents>
        </tank>

    </propulsion>

    <flight_control file="FDM/flight-control.xml" />
    <aerodynamics file="FDM/aerodynamics.xml" />

    <external_reactions>
        <force name="tractor" frame="BODY">
            <location unit="IN">
                <!-- extrapolated from E170 -->
                <x> -398.38</x>
                <y> 0.00 </y>
                <z> -89.832 </z>
            </location>
            <direction>
                <x>1.0</x>
                <y>0.0</y>
                <z>0.0</z>
            </direction>
        </force>
    </external_reactions>
</fdm_config>
