<?xml version="1.0"?>

<aerodynamics>
    <alphalimits unit="RAD">
        <min>-0.10</min>
        <max>0.26</max>
    </alphalimits>
    <hysteresis_limits unit="RAD">
        <min>0.10</min>
        <max>0.15</max>
    </hysteresis_limits>

    <axis name="LIFT">
        <function name="aero/coefficient/CLge">
            <description>Lift_due_to_ground_effect</description>
            <!-- source: https://mcleodsean.wordpress.com/2018/02/06/landing-ground-effect-flare-jsbsim/ -->
            <sum>
                <value>1.0</value>
                <product>
                    <value>0.2</value>
                    <pow>
                        <value>2</value>
                        <product>
                            <value>-6</value>
                            <property>aero/h_b-mac-ft</property>
                        </product>
                    </pow>
                </product>
            </sum>
        </function>

        <function name="aero/coefficient/CLalpha">
            <description>Lift_due_to_alpha</description>
            <product>
                <property>aero/qbar-psf</property>
                <property>metrics/Sw-sqft</property>
                <property>aero/coefficient/CLge</property>
                <table>
                    <independentVar lookup="row">aero/alpha-rad</independentVar>
                    <independentVar lookup="column">aero/stall-hyst-norm</independentVar>
                    <tableData>
                                    0       1
                        -0.20   -0.80   -0.40
                         0.00    0.20    0.00
                         0.10    0.80    0.60
                         0.18    1.10    0.90
                         0.26    1.40    1.20
                         0.60    0.70    0.40
                         0.80    0.45    0.20
                         1.00    0.10    0.02
                         1.20    0.02    0.00
                         1.60    0.00    0.00
                    </tableData>
                </table>
            </product>
        </function>

        <function name="aero/force/Lift_flap">
            <description>Delta Lift due to flaps</description>
            <product>
                <property>aero/coefficient/CLalpha</property>
                <table>
                    <independentVar lookup="row">fcs/flap-pos-deg</independentVar>
                    <tableData>
                        0.0  0.00
                        10.0  0.38
                        20.0  0.63
                        35.0  0.80
                    </tableData>
                </table>
            </product>
        </function>

        <function name="aero/force/Lift_slat">
            <description>Delta Lift due to slats</description>
            <product>
                <property>aero/coefficient/CLalpha</property>
                <property>fcs/slat-pos-norm</property>
                <value>0.25</value>
            </product>
        </function>

        <function name="aero/force/Lift_speedbrake">
            <description>Delta Lift due to speedbrake</description>
            <product>
                <property>aero/qbar-psf</property>
                <property>metrics/Sw-sqft</property>
                <property>fcs/speedbrake-pos-norm</property>
                <value>-0.2</value>
            </product>
        </function>

        <function name="aero/force/Lift_elevator">
            <description>Lift due to Elevator Deflection</description>
            <product>
                <property>aero/qbar-psf</property>
                <property>metrics/Sw-sqft</property>
                <property>fcs/elevator-pos-rad</property>
                <value>0.2</value>
            </product>
        </function>

    </axis>

    <axis name="DRAG">
        <function name="aero/coefficient/DLge">
            <description>Drag_due_to_ground_effect</description>
            <!-- source: https://mcleodsean.wordpress.com/2018/02/06/landing-ground-effect-flare-jsbsim/ -->
            <sum>
                <value>1.0</value>
                <product>
                    <value>-0.9</value>
                    <pow>
                        <value>2</value>
                        <product>
                            <value>-6</value>
                            <property>aero/h_b-mac-ft</property>
                        </product>
                    </pow>
                </product>
            </sum>
        </function>

        <function name="aero/force/Drag_parasitic">
            <description>Parasitic drag</description>
            <product>
                <property>aero/qbar-psf</property>
                <property>metrics/Sw-sqft</property>
                <!-- <value>0.01</value> -->
                <property>aero-config/coefficients/drag-parasitic</property>
            </product>
        </function>

        <function name="aero/force/Drag_alpha">
            <description>Drag due to alpha</description>
            <product>
                <property>aero/qbar-psf</property>
                <property>metrics/Sw-sqft</property>
                <property>aero/coefficient/DLge</property>
                <table>
                    <independentVar lookup="row">aero/alpha-rad</independentVar>
                    <tableData>
                        -1.57  1.3083
                        -0.20  0.0301
                        0.00  0.0000
                        0.20  0.0301
                        1.57  1.3083
                    </tableData>
                </table>
                <property>aero-config/coefficients/drag-alpha</property>
            </product>
        </function>

        <function name="aero/force/Drag_induced">
            <description>Induced drag</description>
            <product>
                <property>aero/qbar-psf</property>
                <property>metrics/Sw-sqft</property>
                <property>aero/cl-squared</property>
                <property>aero/coefficient/DLge</property>
                <!-- <value>0.02</value> -->
                <property>aero-config/coefficients/drag-induced</property>
            </product>
        </function>

        <function name="aero/force/Drag_mach">
            <description>Drag due to mach</description>
            <product>
                <property>aero/qbar-psf</property>
                <property>metrics/Sw-sqft</property>
                <table>
                    <independentVar lookup="row">velocities/mach</independentVar>
                    <tableData>
                        0.00  0.00
                        0.75  0.00
                        0.80  0.30
                        0.82  1.00
                        1.10  5.50
                        1.80  2.50
                    </tableData>
                </table>
                <property>aero-config/coefficients/drag-mach</property>
            </product>
        </function>

        <function name="aero/force/Drag_beta">
            <description>Drag due to sideslip</description>
            <product>
                <property>aero/qbar-psf</property>
                <property>metrics/Sw-sqft</property>
                <table>
                    <independentVar lookup="row">aero/beta-rad</independentVar>
                    <tableData>
                        -1.57  1.23
                        -0.26  0.05
                        0.00  0.00
                        0.26  0.05
                        1.57  1.23
                    </tableData>
                </table>
                <property>aero-config/coefficients/drag-beta</property>
            </product>
        </function>

        <function name="aero/force/Drag_flap">
            <description>Drag due to flaps</description>
            <product>
                <property>aero/qbar-psf</property>
                <property>metrics/Sw-sqft</property>
                <property>fcs/flap-pos-norm</property>
                <property>aero/coefficient/DLge</property>
                <!-- <value> 0.004 </value> -->
                <property>aero-config/coefficients/drag-flap</property>
            </product>
        </function>

        <function name="aero/force/Drag_slat">
            <description>Drag due to slats</description>
            <product>
                <property>aero/qbar-psf</property>
                <property>metrics/Sw-sqft</property>
                <property>fcs/slat-pos-norm</property>
                <property>aero/coefficient/DLge</property>
                <!-- <value> 0.0015 </value> -->
                <property>aero-config/coefficients/drag-slat</property>
            </product>
        </function>

        <function name="aero/force/Drag_gear">
            <description>Drag due to gear</description>
            <product>
                <property>aero/qbar-psf</property>
                <property>metrics/Sw-sqft</property>
                <property>gear/gear-pos-norm</property>
                <!-- <value>0.004</value> -->
                <property>aero-config/coefficients/drag-gear</property>
            </product>
        </function>

        <function name="aero/force/Drag_speedbrake">
            <description>Drag due to speedbrakes</description>
            <product>
                <property>aero/qbar-psf</property>
                <property>metrics/Sw-sqft</property>
                <property>fcs/speedbrake-pos-norm</property>
                <!-- <value>0.05</value> -->
                <property>aero-config/coefficients/drag-speedbrake</property>
            </product>
        </function>

        <function name="aero/force/Drag_elevator">
            <description>Drag due to Elevator Deflection</description>
            <product>
                <property>aero/qbar-psf</property>
                <property>metrics/Sw-sqft</property>
                <abs>
                    <property>fcs/elevator-pos-norm</property>
                </abs>
                <!-- <value>0.01</value> -->
                <property>aero-config/coefficients/drag-elevator</property>
            </product>
        </function>

    </axis>

    <axis name="SIDE">

        <function name="aero/force/Side_beta">
            <description>Side force due to beta</description>
            <product>
                <property>aero/qbar-psf</property>
                <property>metrics/Sw-sqft</property>
                <property>aero/beta-rad</property>
                <value>-1</value>
            </product>
        </function>

    </axis>

    <axis name="ROLL">

        <function name="aero/moment/Roll_beta">
            <description>Roll moment due to beta</description>
            <product>
                <property>aero/qbar-psf</property>
                <property>metrics/Sw-sqft</property>
                <property>metrics/bw-ft</property>
                <property>aero/beta-rad</property>
                <!-- ground effect increases self-stabilizing tendency -->
                <property>aero/coefficient/CLge</property>
                <value>-0.1</value>
            </product>
        </function>

        <function name="aero/moment/Roll_damp">
            <description>Roll moment due to roll rate</description>
            <product>
                <property>aero/qbar-psf</property>
                <property>metrics/Sw-sqft</property>
                <property>metrics/bw-ft</property>
                <property>aero/bi2vel</property>
                <property>velocities/p-aero-rad_sec</property>
                <value>-0.4</value>
            </product>
        </function>

        <function name="aero/moment/Roll_yaw">
            <description>Roll moment due to yaw rate</description>
            <product>
                <property>aero/qbar-psf</property>
                <property>metrics/Sw-sqft</property>
                <property>metrics/bw-ft</property>
                <property>aero/bi2vel</property>
                <property>velocities/r-aero-rad_sec</property>
                <value>0.15</value>
            </product>
        </function>

        <function name="aero/moment/Roll_aileron">
            <description>Roll moment due to aileron</description>
            <product>
                <property>aero/qbar-psf</property>
                <property>metrics/Sw-sqft</property>
                <property>metrics/bw-ft</property>
                <property>fcs/left-aileron-pos-rad</property>
                <table>
                    <independentVar lookup="row">velocities/mach</independentVar>
                    <tableData>
                        0.09    1.00
                        0.70    1.00
                        0.82    0.80
                        0.85    0.50
                        1.00    0.10
                        2.00    0.33
                    </tableData>
                </table>
                <value>0.1</value>
            </product>
        </function>

        <function name="aero/moment/Roll_rudder">
            <description>Roll moment due to rudder</description>
            <product>
                <property>aero/qbar-psf</property>
                <property>metrics/Sw-sqft</property>
                <property>metrics/bw-ft</property>
                <property>fcs/rudder-pos-rad</property>
                <value>0.01</value>
            </product>
        </function>

    </axis>

    <axis name="PITCH">

        <function name="aero/moment/Pitch_alpha">
            <description>Pitch moment due to alpha</description>
            <product>
                <property>aero/qbar-psf</property>
                <property>metrics/Sw-sqft</property>
                <property>metrics/cbarw-ft</property>
                <property>aero/alpha-rad</property>
                <value>-0.6</value>
            </product>
        </function>

        <function name="aero/moment/Pitch_elevator">
            <description>Pitch moment due to elevator</description>
            <product>
                <property>aero/qbar-psf</property>
                <property>metrics/Sw-sqft</property>
                <property>metrics/cbarw-ft</property>
                <property>fcs/elevator-pos-rad</property>
                <table>
                    <independentVar lookup="row">velocities/mach</independentVar>
                    <tableData>
                        0.09    1.00
                        0.70    1.00
                        0.82    0.80
                        0.85    0.50
                        1.00    0.10
                        2.00    0.33
                    </tableData>
                </table>
                <value>-1.8</value>
            </product>
        </function>

        <function name="aero/moment/Pitch_damp">
            <description>Pitch moment due to pitch rate</description>
            <product>
                <property>aero/qbar-psf</property>
                <property>metrics/Sw-sqft</property>
                <property>metrics/cbarw-ft</property>
                <property>aero/ci2vel</property>
                <property>velocities/q-aero-rad_sec</property>
                <value>-17</value>
            </product>
        </function>

        <function name="aero/moment/Pitch_alphadot">
            <description>Pitch moment due to alpha rate</description>
            <product>
                <property>aero/qbar-psf</property>
                <property>metrics/Sw-sqft</property>
                <property>metrics/cbarw-ft</property>
                <property>aero/ci2vel</property>
                <property>aero/alphadot-rad_sec</property>
                <value>-6</value>
            </product>
        </function>

        <function name="aero/moment/Pitch_mach">
            <description>Pitch moment due to mach tuck</description>
            <product>
                <property>aero/qbar-psf</property>
                <property>metrics/Sw-sqft</property>
                <property>metrics/cbarw-ft</property>
                <table>
                    <independentVar lookup="row">velocities/mach</independentVar>
                    <tableData>
                        0.0   0.0
                        0.75  0.0
                        0.82 -0.1
                        0.85 -0.5
                        1.00 -1.0
                        1.20  0.0
                    </tableData>
                </table>
                <value>0.5</value>
            </product>
        </function>

    </axis>

    <axis name="YAW">

        <function name="aero/moment/Yaw_beta">
            <description>Yaw moment due to beta</description>
            <product>
                <property>aero/qbar-psf</property>
                <property>metrics/Sw-sqft</property>
                <property>metrics/bw-ft</property>
                <property>aero/beta-rad</property>
                <value>0.12</value>
            </product>
        </function>

        <function name="aero/moment/Yaw_damp">
            <description>Yaw moment due to yaw rate</description>
            <product>
                <property>aero/qbar-psf</property>
                <property>metrics/Sw-sqft</property>
                <property>metrics/bw-ft</property>
                <property>aero/bi2vel</property>
                <property>velocities/r-aero-rad_sec</property>
                <value>-0.15</value>
            </product>
        </function>

        <function name="aero/moment/Yaw_rudder">
            <description>Yaw moment due to rudder</description>
            <product>
                <property>aero/qbar-psf</property>
                <property>metrics/Sw-sqft</property>
                <property>metrics/bw-ft</property>
                <property>fcs/rudder-pos-rad</property>
                <value>-0.1</value>
            </product>
        </function>

        <function name="aero/moment/Yaw_aileron">
            <description>Adverse yaw</description>
            <product>
                <property>aero/qbar-psf</property>
                <property>metrics/Sw-sqft</property>
                <property>metrics/bw-ft</property>
                <property>fcs/left-aileron-pos-rad</property>
                <value>0.01</value>
            </product>
        </function>

    </axis>

</aerodynamics>
